// COMSOL Multiphysics 6.1.0.252 model "FP cavity.mph"
// Outline of the model tree

Parameters
  lbd = 589.3[nm]
  w0 = 1.5[um]
  nu = c_const/lbd
  d = 4[um]
  d1 = 10[um]
  n2 = 37.347
  n1 = 1
  k0 = 2*pi/lbd
  phi_2pi = 2*k0*n2*d/(2*pi)  // phi/2*pi
  F = 4*r^2/((1-r^2)^2)  // finess
  r = (n2-n1)/(n2+n1)  // reflectance
  z1 = -(d1+d/2)  // distance of waist
  R = z1 + z0^2/z1  // radius
  z0 = w0^2*pi/lbd
  w = w0*sqrt(1+(z1/z0)^2)

Functions
  pw1: Piecewise "分段 1" | smooth = contd2; pieces = {{-d/2-d1, -d/2, n1}, {-d/2, d/2, n2}, {d/2, d/2+d1, n1}}; argunit = m; fununit = 1

Coordinate systems
  pml1: PML "完美匹配层 1" on domains 1-4, 6, 7, 9, 10, 12-15

Geometry
  geom1 "几何 1" (2D, length unit µm)
    r1: Rectangle "矩形 1"
      base = center
      layername = 层 1
      layer = 500[nm]
      layerleft = on
      layerright = on
      layertop = on
      size = {d+2*d1+1[um], 10*w0+1[um]}
    r2: Rectangle "矩形 2" | base = center; layername = 层 1; layer = 500[nm]; size = {d, 10*w0+1[um]}
    fin: Finalize "形成联合体"

Materials
  mat1: Common "Air" on all domains
    def "Basic"
      thermalexpansioncoefficient = alpha_p(pA,T)
      molarmass = 0.02897[kg/mol]
      bulkviscosity = muB(T)
      relpermeability = 1
      relpermittivity = 1
      dynamicviscosity = eta(T)
      ratioofspecificheat = 1.4
      electricconductivity = 0[S/m]
      heatcapacity = Cp(T)
      density = rho(pA,T)
      thermalconductivity = k(T)
      soundspeed = cs(T)
      eta: Piecewise | arg = T; pieces = {200.0, 1600.0, -8.38278E-7+8.35717342E-8*T^1-7.69429583E-11*T^2+4.6437266E-14*T^3-1.06585607E-17*T^4}; argunit = K; fununit = Pa*s
      Cp: Piecewise | arg = T; pieces = {200.0, 1600.0, 1047.63657-0.372589265*T^1+9.45304214E-4*T^2-6.02409443E-7*T^3+1.2858961E-10*T^4}; argunit = K; fununit = J/(kg*K)
      rho: Analytic | expr = pA*0.02897/R_const[K*mol/J]/T; args = {pA, T}; fununit = kg/m^3; argunit = {Pa, K}
      k: Piecewise | arg = T; pieces = {200.0, 1600.0, -0.00227583562+1.15480022E-4*T^1-7.90252856E-8*T^2+4.11702505E-11*T^3-7.43864331E-15*T^4}; argunit = K; fununit = W/(m*K)
      cs: Analytic | expr = sqrt(1.4*R_const[K*mol/J]/0.02897*T); args = T; fununit = m/s; argunit = K
      an1: Analytic | funcname = alpha_p; expr = -1/rho(pA,T)*d(rho(pA,T),T); args = {pA, T}; fununit = 1/K; argunit = {Pa, K}
      an2: Analytic "Analytic 2a" | funcname = muB; expr = 0.6*eta(T); args = T; fununit = Pa*s; argunit = K
    RefractiveIndex
      n = n1
      ki = 0
    NonlinearModel
      BA = (def.gamma+1)/2
    idealGas
      Rs = R_const/Mn
      heatcapacity = Cp(T)
      ratioofspecificheat = 1.4
      molarmass = 0.02897
      Cp: Piecewise | arg = T; pieces = {200.0, 1600.0, 1047.63657-0.372589265*T^1+9.45304214E-4*T^2-6.02409443E-7*T^3+1.2858961E-10*T^4}; argunit = K; fununit = J/(kg*K)
  mat2: Common "Silicon" on domains 7-9
    def "Basic"
      relpermeability = 1
      electricconductivity = 1e-12[S/m]
      thermalexpansioncoefficient = 2.6e-6[1/K]
      heatcapacity = 700[J/(kg*K)]
      relpermittivity = 11.7
      density = 2329[kg/m^3]
      thermalconductivity = 130[W/(m*K)]
    Enu "Young's modulus and Poisson's ratio"
      E = 170[GPa]
      nu = 0.28
    RefractiveIndex
      n = n2
      ki = 0

Physics
  ewbe: ElectromagneticWavesBeamEnvelopes "电磁波，波束包络" (disabled) on all domains
    dependent variable E1 = {E1x, E1y, E1z}
    MeshControl.elemCountT = 30
    MeshControl.elemCountL = 30
    components.components = outofplane
    WaveVector.dirCount = BiDirectionality
    WaveVector.PhaseSpec = UserDefined
    WaveVector.phase1 = ewbe.k0*x*pw1(x)
    webe1: WaveEquationBeamEnvelopes "波动方程，波束包络 1" (default)
    pec1: PerfectElectricConductor "理想电导体 1" (default)
    init1: init "初始值 1" (default)
    sctr1: Scattering "散射边界条件 1" on boundaries 1-3, 5, 7, 9, 14, 16, 21, 23, 28, 30, 35-38
    port1: Port "端口 1" on boundaries 10
      PortSlit = 1
      SlitType = DomainBacked
      PortOrientation = ReversePort
      beta = k0
      E0 = {0, 0, exp(-(y/w)^2)*exp(-1j*pi*y^2/(lbd*R))}
  ewfd: ElectromagneticWavesFrequencyDomain "电磁波，频域" on all domains
    dependent variable E = {Ex, Ey, Ez}
    wee1: WaveEquationElectric "波动方程，电 1" (default)
    pec1: PerfectElectricConductor "理想电导体 1" (default)
    init1: init "初始值 1" (default)
    sctr1: Scattering "散射边界条件 1" on boundaries 1-3, 5, 7, 9, 14, 16, 21, 23, 28, 30, 35-38
    port1: Port "端口 1" on boundaries 10
      PortSlit = 1
      SlitType = DomainBacked
      PortOrientation = ReversePort
      E0 = {0, 0, exp(-(y/w)^2)*exp(-1j*pi*y^2/(lbd*R))}

Mesh
  mesh1 "网格 1"
    size: MeshSizeDefault "大小" | hmax = 8.25; hmin = 1.25; hnarrow = 0.9; hgrad = 2; hauto = 9
    distr1: Distribution "分布 1" on boundaries 9
      type = predefined
      elemcount = 200
      elemratio = 3
      growthrate = exponential
    distr4: Distribution "分布 4" on boundaries 23
      type = predefined
      reverse = on
      elemcount = 200
      elemratio = 3
      growthrate = exponential
    distr2: Distribution "分布 2" on boundaries 10 | numelem = 120
    distr3: Distribution "分布 3" on boundaries 2, 8, 12, 30
    dis1: Distribution "分布 1a" on boundaries 16 | numelem = 160
    map1: Map "映射 1" on domains 1-15 | adjustedgdistr = on; smoothmaxiter = 4; smoothmaxdepth = 4

Studies
  std1 "研究 1"
    param: Parametric "参数化扫描" | pname = n2; plistarr = range(37.33,0.002,37.35)
    freq: Frequency "频域" | punit = THz; plist = nu

Solver configurations
  sol1 "解 1" (study std1)
    v1: Variables "因变量 1"
    s1: Stationary "稳态求解器 1" | linpmethod = sol
      dDef: Direct "直接"
      p1: Parametric "参数化 1" | pname = freq; plistarr = nu; punit = THz; pcontinuationmode = no
      fc1: FullyCoupled "全耦合 1" | linsolver = dDef
  sol2 "参数化解 1" (study std1)

Datasets
  dset1: Solution | solution = sol1
  dset2: Solution | solution = sol2

Derived values
  gev1: EvalGlobal "反射率 (ewbe)" | data = dset1; table = tbl1; expr = {ewbe.Rport_1, ewbe.Rtotal}

Tables
  tbl1: Table "表格 1"
    freq (THz) | 反射率，端口 1 (1) | 总反射率 (1)
    508.726 | 0 | 0

Plots
  pg1: PlotGroup2D "电场 (ewbe)" on domains 5, 8, 11 | data = dset1
    surf1: Surface "电场" | expr = ewbe.normE2; descr = 电场模，第二个波
    con1: Contour "等值线 1" (disabled) | expr = ewbe.normE
  pg2: PlotGroup2D "电场 (ewbe) 1" on domains 11 | data = dset1
    surf1: Surface "电场" | expr = ewbe.normE2
    con1: Contour "等值线 1" (disabled) | expr = ewbe.normE
  pg3: PlotGroup2D "电场 (ewbe) 2" | data = dset2
    surf1: Surface "电场" | expr = ewbe.normE
  pg4: PlotGroup1D "反射率 (ewbe)" | data = dset2; ylabel = 反射率 (1)
    glob1: Global "全局 1" | expr = ewbe.Rport_1; descr = 反射率，端口 1; xdata = expr; xdataexpr = n2