// COMSOL Multiphysics 6.1.0.252 model "micro ring.mph"
// Outline of the model tree

Parameters
  n1 = 1.5
  n2 = 1.2
  rho = 5[um]
  a = 2[um]
  b = 1.4[um]
  L = 8[um]
  n_L = 2  // azithuminal number
  lbd = 2*pi*rho*n1/n_L

Geometry
  geom1 "几何 1" (2D axisymmetric, length unit m)
    r1: Rectangle "矩形 1" | pos = {rho, 0}; base = center; size = {a, b}
    sq1: Square "正方形 1" | pos = {rho, 0}; base = center; size = L
    fin: Finalize "形成联合体"

Materials
  mat1: Common "材料 1" on all domains
    RefractiveIndex "折射率"
      n = n1
      ki = 0
  mat2: Common "材料 2" on domains 1
    RefractiveIndex "折射率"
      n = n2
      ki = 0

Physics
  ewfd: ElectromagneticWavesFrequencyDomain "电磁波，频域" on all domains
    dependent variable E = {Er, Ephi, Ez}
    MeshControl.SizeControlParameter = Wavelength
    MeshControl.PhysicsControlledMeshMinimumWavelength = 400[nm]
    components.components = threecomponent
    outofplanewavenumber.mFloquet = n_L
    wee1: WaveEquationElectric "波动方程，电 1" (default)
    axi1: AxialSymmetry "轴对称 1" (default)
    pec1: PerfectElectricConductor "理想电导体 1" (default)
    init1: init "初始值 1" (default)
    sctr1: Scattering "散射边界条件 1" on boundaries 1, 8 | WaveType = CylindricalWave
    sctr2: Scattering "散射边界条件 2" on boundaries 2, 3 | WaveType = PlaneWave

Mesh
  mesh1 "网格 1" (physics-controlled)

Studies
  std1 "研究 1"
    param: Parametric "参数化扫描" | pname = n_L; plistarr = range(1,1,3)
    eig: Eigenfrequency "特征频率" | neigs = 2; shift = c_const/lbd; conrad = 1; linpsolnum = auto

Solver configurations
  sol1 "解 1" (study std1)
    v1: Variables "因变量 1"
    e1: Eigenvalue "特征值求解器 1" | eigref = c_const/lbd
      d1: Direct "建议的直接求解器 (ewfd)"
  sol2 "参数化解 1" (study std1)

Datasets
  dset1: Solution | solution = sol1
  dset2: Solution | solution = sol2
  rev1: Revolve2D "二维旋转 1" | data = dset2; startangle = -90; revangle = 225

Derived values
  gev1: EvalGlobal "特征频率 (ewfd)" | data = dset2; table = tbl1; expr = {ewfd.freq, ewfd.Qfactor}; unit = {THz, }

Tables
  tbl1: Table "表格 1"
    n_L | 特征频率 (THz) | 频率 (THz) | 品质因子 (1)
    1 | 6.36179+7.55946e-08i | 6.36179 | 4.20783e+07
    1 | 6.36179+6.33051e-07i | 6.36179 | 5.02471e+06
    1 | 6.36181+3.38172e-13i | 6.36181 | 9.40617e+12
    1 | 6.36181+1.01118e-10i | 6.36181 | 3.14573e+10
    1 | 6.36181+4.15385e-10i | 6.36181 | 7.65773e+09
    1 | 6.36181+3.13763e-08i | 6.36181 | 1.01379e+08
    2 | 12.7236+3.47137e-07i | 12.7236 | 1.83265e+07
    2 | 12.7236+2.50631e-06i | 12.7236 | 2.53831e+06
    2 | 12.7236+7.47204e-13i | 12.7236 | 8.51415e+12
    2 | 12.7236+3.16544e-10i | 12.7236 | 2.00977e+10
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
Plots
  pg1: PlotGroup2D "电场 (ewfd)" | data = dset2; dataisaxisym = on
    surf1: Surface "表面 1" | expr = ewfd.normE