// COMSOL Multiphysics 6.1.0.252 model "1d_phtonic_crystal.mph"
// Outline of the model tree

Parameters
  k_b = 0.1  // bloch_parameter
  d1 = 1[um]
  d2 = 1[um]
  gamma = d1+d2  // periodic
  g = 2*pi/gamma
  n1 = 1.5
  n2 = 3.2

Functions
  pw1: Piecewise "分段 1" | funcname = pw_kb; pieces = {{0, 1, x}, {1, 2, 1}, {2, 3, 3-x}}
  pw2: Piecewise "分段 2" | funcname = pw_kx; pieces = {{0, 1, 0}, {1, 2, x-1}, {2, 3, 3-x}}

Variables
  var1 "变量 1"
    k = pw_kb(k_b)*g
    kx = pw_kx(k_b)*g

Geometry
  geom1 "几何 1" (2D, length unit m)
    r1: Rectangle "矩形 1" | base = center; size = {d1, 3[um]}
    r2: Rectangle "矩形 2" | pos = {(d1+d2)/2, 0}; base = center; size = {d2, 3[um]}
    fin: Finalize "形成联合体"

Materials
  mat1: Common "材料 1" on domains 1
    RefractiveIndex "折射率"
      n = n1
      ki = 0
  mat2: Common "材料 2" on domains 2
    RefractiveIndex "折射率"
      n = n2
      ki = 0

Physics
  ewfd: ElectromagneticWavesFrequencyDomain "电磁波，频域" on all domains
    dependent variable E = {Ex, Ey, Ez}
    MeshControl.SizeControlParameter = UserDefined
    MeshControl.PhysicsControlledMeshMaximumElementSize = 80[nm]
    components.components = inplane
    wee1: WaveEquationElectric "波动方程，电 1" (default)
    pec1: PerfectElectricConductor "理想电导体 1" (default)
    init1: init "初始值 1" (default)
    pc1: PeriodicCondition "周期性条件 1" on boundaries 2, 3, 5, 6
      PeriodicType = Floquet
      kFloquet = {k, kx, 0}
      destinationDomains: boundaries 3, 6
    pc2: PeriodicCondition "周期性条件 2" on boundaries 1, 7
      PeriodicType = Floquet
      kFloquet = {k, kx, 0}
      destinationDomains: boundaries 7

Mesh
  mesh1 "网格 1" (physics-controlled)

Studies
  std1 "研究 1"
    param: Parametric "参数化扫描" | pname = k_b; plistarr = range(0.02,0.06,0.98)
    eig: Eigenfrequency "特征频率"
      eigmethod = region
      neigs = 4
      shift = 0.9[THz]
      eigwhich = lr
      appnreigs = 5
      maxnreigs = 6
      eigsr = 1
      eiglr = 120
      conrad = 1
      linpsolnum = auto

Solver configurations
  sol1 "解 1" (study std1)
    v1: Variables "因变量 1"
    e1: Eigenvalue "特征值求解器 1"
      d1: Direct "建议的直接求解器 (ewfd)"
  sol2 "参数化解 1" (study std1)

Datasets
  dset1: Solution | solution = sol1
  dset2: Solution | solution = sol2
  cln1: CutLine2D "二维截线 1" | data = dset2; genpoints = {{-d1/2, 0}, {d1/2 + d2, 0}}

Derived values
  gev1: EvalGlobal "特征频率 (ewfd)" | data = dset2; table = tbl1; expr = {ewfd.freq, ewfd.Qfactor}; unit = {THz, 1}

Tables
  tbl1: Table "表格 1"
    k_b | 特征频率 (THz) | 频率 (THz) | 品质因子 (1)
    0.05 | 45.6055+1.61516e-13i | 45.6055 | 1.4118e+14
    0.05 | 45.6055+2.96615e-13i | 45.6055 | 7.68766e+13
    0.05 | 56.7542+4.81583e-10i | 56.7542 | 5.89246e+10
    0.05 | 56.7542+2.69794e-10i | 56.7542 | 1.05181e+11
    0.15 | 46.2719-1.86088e-15i | 46.2719 | 1.24328e+16
    0.15 | 46.2719+9.60942e-14i | 46.2719 | 2.40763e+14
    0.15 | 52.8162+1.44141e-15i | 52.8162 | 1.8321e+16
    0.15 | 52.8162+5.24057e-15i | 52.8162 | 5.03917e+15
    0.25 | 47.4923-1.32994e-13i | 47.4923 | 1.7855e+14
    0.25 | 47.4923+1.0465e-13i | 47.4923 | 2.2691e+14
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
Plots
  pg1: PlotGroup2D "电场 (ewfd)" | data = dset2
    surf1: Surface "表面 1" | expr = ewfd.normE
  pg2: PlotGroup1D "一维绘图组 2" | data = dset2
    glob1: Global "全局 1" | expr = ewfd.freq; unit = Hz; descr = 频率; xdata = expr; xdataexpr = k_b
  pg3: PlotGroup1D "一维绘图组 3" | data = dset2
    lngr1: LineGraph "线结果图 1" | data = cln1; expr = ewfd.normH
    lngr2: LineGraph "线结果图 2" | data = cln1; expr = ewfd.n_iso; descr = 折射率，实部，各向同性值