// COMSOL Multiphysics 6.1.0.252 model "air gap.mph"
// Outline of the model tree

Parameters
  n1 = 1.5
  n2 = 1.2
  lbd = 780[nm]
  d = lbd/3
  theta_c = asin(n2/n1)
  theta = 1.2*theta_c
  L = 2[um]
  kx = k0*n1*sin(theta)
  k0 = 2*pi/lbd
  ky = k0*n1*cos(theta)
  a = 2*lbd
  N = sqrt(n1^2*sin(theta)^2 - n2^2)
  alpha = exp(-N*d*k0)
  e_phi = exp(-1j*2*asin(sqrt( (n1^2*sin(theta)^2 - n2^2)/(n1^2 - n2^2) )))
  Tab = (1-e_phi^2)*alpha/(1-e_phi^2*alpha^2)
  P_in = L*0.5*E0^2/(Z0_const/n1)*cos(theta)
  E0 = 100[V/m]
  t = abs(Tab)
  T_i = t^2

Geometry
  geom1 "几何 1" (2D, length unit m)
    r1: Rectangle "矩形 1" | base = center; size = {L, d}
    r2: Rectangle "矩形 2" | pos = {0, (d+a)/2}; base = center; size = {L, a}
    r3: Rectangle "矩形 3" | pos = {0, -(d+a)/2}; base = center; size = {L, a}
    fin: Finalize "形成联合体"

Materials
  mat1: Common "材料 1" on domains 1, 3
    RefractiveIndex "折射率"
      n = n1
      ki = 0
  mat2: Common "材料 2" on domains 2
    RefractiveIndex "折射率"
      n = n2
      ki = 0

Physics
  ewfd: ElectromagneticWavesFrequencyDomain "电磁波，频域" on all domains
    dependent variable E = {Ex, Ey, Ez}
    MeshControl.SizeControlParameter = UserDefined
    MeshControl.PhysicsControlledMeshMaximumElementSize = lbd/5
    components.components = outofplane
    wee1: WaveEquationElectric "波动方程，电 1" (default)
    pec1: PerfectElectricConductor "理想电导体 1" (default)
    init1: init "初始值 1" (default)
    pc1: PeriodicCondition "周期性条件 1" on boundaries 1, 3, 5, 8-10
      PeriodicType = Floquet
      Floquet_source = FromPeriodicPort
      destinationDomains: boundaries 8-10
    port1: Port "端口 1" on boundaries 7 | Pin = P_in; PortType = Periodic; Eampl = {0, 0, 1}; alpha_inc = theta; n = n1
    port2: Port "端口 2" on boundaries 2
      PortExcitation = off
      PortType = Periodic
      Eampl = {0, 0, 1}
      alpha_inc = theta
      n = n1

Mesh
  mesh1 "网格 1" (physics-controlled)

Studies
  std1 "研究 1"
    freq: Frequency "频域" | punit = THz; plist = c_const/lbd

Solver configurations
  sol1 "解 1" (study std1)
    v1: Variables "因变量 1"
    s1: Stationary "稳态求解器 1" | stol = 0.01; linpmethod = sol
      p1: Parametric "参数化 1" | pname = freq; plistarr = c_const/lbd; punit = THz; pcontinuationmode = no
      fc1: FullyCoupled "全耦合 1" | linsolver = d1
      d1: Direct "建议的直接求解器 (ewfd)"

Datasets
  dset1: Solution | solution = sol1
  cln1: CutLine2D "二维截线 1" | data = dset1; genpoints = {{0, -d/2}, {0, -(a+d/2)}}
  cln2: CutLine2D "二维截线 2" | data = dset1; genpoints = {{0, d/2}, {0, -(a+d/2)}}
  grid1: Grid1D "一维栅格 1" | source = data; data = dset1; parmax1 = 1000[nm]

Derived values
  gev1: EvalGlobal "反射率、透射率和吸收率 (ewfd)"
    data = dset1
    table = tbl1
    expr = {ewfd.Rorder_0, ewfd.Rtotal, ewfd.Torder_0, ewfd.Ttotal, ewfd.RTtotal, ewfd.Atotal}

Tables
  tbl1: Table "表格 1"
    freq (THz) | 反射率，阶数 0 (1) | 总反射率 (1) | 透射率，阶数 0 (1) | 总透射率 (1) | 总反射率和透射率 (1) | 吸收率 (1)
    384.349 | 0.732267 | 0.732267 | 0.267733 | 0.267733 | 1 | 7.32747e-15

Plots
  pg1: PlotGroup2D "电场 (ewfd)" | data = dset1
    surf1: Surface "表面 1" | expr = abs(ewfd.Ez)
  pg2: PlotGroup1D "一维绘图组 2" | data = cln1
    lngr1: LineGraph "线结果图 1" | expr = ewfd.normE
    lngr2: LineGraph "线结果图 2" | data = grid1; expr = E0*t
  pg3: PlotGroup2D "电场 (ewfd) 1" on domains 1, 2 | data = dset1
    surf1: Surface "表面 1" | expr = abs(ewfd.Ez)
  pg4: PlotGroup1D "一维绘图组 4" | data = cln2
    lngr1: LineGraph "线结果图 1" | expr = ewfd.normE