// COMSOL Multiphysics 6.1.0.252 model "rayleigh scattering_1.mph"
// Outline of the model tree

Parameters
  scale = 500[nm]
  f = c_const/lbd
  k = 2*pi/lbd
  dn = 0.1
  E0 = 1[V/m]
  factor = 0.1
  lbd = 500[nm]

Variables
  var1 "变量 1"
    E_radiation = intop1(ewfd.nrelPoav)

Couplings
  intop1: Integration "积分 1" on boundaries 9-12, 22, 23, 29, 34

Coordinate systems
  pml1: PML "完美匹配层 1" on domains 1-4, 7-10 | ScalingType = Spherical

Geometry
  geom1 "几何 1" (3D, length unit m)
    sph1: Sphere "球体 1" | layername = 层 1; layer = lbd/4 + scale/4; r = 1.5*(1+factor)*scale
    sph2: Sphere "球体 2" | r = scale*factor
    fin: Finalize "形成联合体"

Materials
  mat1: Common "Air" on all domains
    def "Basic"
      thermalexpansioncoefficient = alpha_p(pA,T)
      molarmass = 0.02897[kg/mol]
      bulkviscosity = muB(T)
      relpermeability = 1
      relpermittivity = 1
      dynamicviscosity = eta(T)
      ratioofspecificheat = 1.4
      electricconductivity = 0[S/m]
      heatcapacity = Cp(T)
      density = rho(pA,T)
      thermalconductivity = k(T)
      soundspeed = cs(T)
      eta: Piecewise | arg = T; pieces = {200.0, 1600.0, -8.38278E-7+8.35717342E-8*T^1-7.69429583E-11*T^2+4.6437266E-14*T^3-1.06585607E-17*T^4}; argunit = K; fununit = Pa*s
      Cp: Piecewise | arg = T; pieces = {200.0, 1600.0, 1047.63657-0.372589265*T^1+9.45304214E-4*T^2-6.02409443E-7*T^3+1.2858961E-10*T^4}; argunit = K; fununit = J/(kg*K)
      rho: Analytic | expr = pA*0.02897/R_const[K*mol/J]/T; args = {pA, T}; fununit = kg/m^3; argunit = {Pa, K}
      k: Piecewise | arg = T; pieces = {200.0, 1600.0, -0.00227583562+1.15480022E-4*T^1-7.90252856E-8*T^2+4.11702505E-11*T^3-7.43864331E-15*T^4}; argunit = K; fununit = W/(m*K)
      cs: Analytic | expr = sqrt(1.4*R_const[K*mol/J]/0.02897*T); args = T; fununit = m/s; argunit = K
      an1: Analytic | funcname = alpha_p; expr = -1/rho(pA,T)*d(rho(pA,T),T); args = {pA, T}; fununit = 1/K; argunit = {Pa, K}
      an2: Analytic "Analytic 2a" | funcname = muB; expr = 0.6*eta(T); args = T; fununit = Pa*s; argunit = K
    RefractiveIndex
      n = 1
      ki = 0
    NonlinearModel
      BA = (def.gamma+1)/2
    idealGas
      Rs = R_const/Mn
      heatcapacity = Cp(T)
      ratioofspecificheat = 1.4
      molarmass = 0.02897
      Cp: Piecewise | arg = T; pieces = {200.0, 1600.0, 1047.63657-0.372589265*T^1+9.45304214E-4*T^2-6.02409443E-7*T^3+1.2858961E-10*T^4}; argunit = K; fununit = J/(kg*K)
  mat2: Common "材料 2" on domains 6
    RefractiveIndex "折射率"
      n = 1+dn
      ki = 0

Physics
  ewfd: ElectromagneticWavesFrequencyDomain "电磁波，频域" on all domains
    dependent variable E = {Ex, Ey, Ez}
    MeshControl.SizeControlParameter = UserDefined
    MeshControl.PhysicsControlledMeshMaximumElementSize = lbd/4
    BackgroundField.SolveFor = scatteredField
    BackgroundField.WaveType = userdef
    BackgroundField.Eb = {E0*exp(-1j*k*z), 0, 0}
    BackgroundField.Eampl = E0
    wee1: WaveEquationElectric "波动方程，电 1" (default)
    pec1: PerfectElectricConductor "理想电导体 1" (default)
    init1: init "初始值 1" (default)
    sctr1: Scattering "散射边界条件 1" on boundaries 5-8, 20, 21, 28, 35 | WaveType = SphericalWave
    ffd1: FarFieldDomain "远场域 1" on domains 5
      ffc1: FarFieldCalculation "远场计算 1" on boundaries 9-12, 22, 23, 29, 34
        FarFieldBoundarySide = FarFieldBoundaryOutside

Mesh
  mesh1 "网格 1"
    size: MeshSizeDefault "大小" | hmax = 1.2500E-7; hmin = 3.7500E-9; hcurve = 0.6; hnarrow = 0.5; hgrad = 1.5; custom = on
    size1: Size "大小 1" on domains 6
      hmax = 1.1360E-7
      hmin = 3.4090E-9
      hcurve = 0.6
      hnarrow = 0.5
      hgrad = 1.5
      custom = on
    dis1: Distribution "分布 1" on edges 1, 14, 24, 33, 39, 42 | type = predefined
    ftet1: FreeTet "自由四面体网格 1" on domains 5, 6 | optcurved = on
    swe1: Sweep "扫掠 1" on domains 1-4, 7-10
      dis1: Distribution "分布 1" on domains 1-4, 7-10
    ref1: Refine "细化 1" on domains 6 | rmethod = regular

Studies
  std1 "散射体尺寸"
    param: Parametric "参数化扫描" | pname = factor; plistarr = range(0.1,0.1,1)
    freq: Frequency "频域" | punit = THz; plist = f
  std2 "散射波长"
    param: Parametric "参数化扫描" | pname = lbd; plistarr = range(500,50,1000); punit = nm
    freq: Frequency "频域" | punit = THz; plist = f

Solver configurations
  sol1 "解 1" (study std1)
    v1: Variables "因变量 1"
    s1: Stationary "稳态求解器 1" | stol = 1e-6; linpmethod = sol
      p1: Parametric "参数化 1" | pname = freq; plistarr = f; punit = THz; pcontinuationmode = no
      fc1: FullyCoupled "全耦合 1" | linsolver = i1
      i1: Iterative "建议的迭代求解器 (ewfd)" | linsolver = bicgstab
        mg1: Multigrid "多重网格 1"
  sol2 "参数化解 1" (study std1)
  sol13 "解 13" (study std2)
    // same settings as sol1
  sol14 "参数化解 2" (study std2)

Datasets
  dset1: Solution | solution = sol1
  dset2: Solution | solution = sol2
  int1: Integral "积分 1" | data = dset2
  dset3: Solution | solution = sol13
  dset4: Solution | solution = sol14

Derived values
  int1: IntSurface "表面积分 1" on boundaries 9-12, 22, 23, 29, 34
    data = dset2
    table = tbl3
    tablecols = outer
    expr = ewfd.nrelPoav
    unit = W
    descr = 相对场功率流出，时均

Tables
  rp1: Table "方向性"
    // 辐射方向图
    θ (deg) | φ (deg) | 方向性 | 方向性 (dB)
    0 | 0 | 38.8704 | 15.8962
  tbl1: Table "表格 1"
    // 表面积分 1 {int1}
    freq (THz) | 相对场功率流出，时均 (W) | 相对场功率流出，时均 (W)
    599.585 | 7.49463e-19 | 7.55609e-19
  tbl2: Table "表格 2"
    // 表面积分 1 {int1}
    factor | freq (THz) | 相对场功率流出，时均 (W) | 相对场功率流出，时均 (W) | freq=599.58 THz, 相对场功率流出，时均 (W)
    0.1 | 599.585 | 1.715e-20 | 1.715e-20 | 1.715e-20
  tbl3: Table "表格 3"
    // 表面积分 1 {int1}
    freq (THz) | factor=0.1, 相对场功率流出，时均 (W) | factor=0.2, 相对场功率流出，时均 (W) | factor=0.3, 相对场功率流出，时均 (W) | factor=0.4, 相对场功率流出，时均 (W) | factor=0.5, 相对场功率流出，时均 (W) | factor=0.6, 相对场功率流出，时均 (W) | factor=0.7, 相对场功率流出，时均 (W) | factor=0.8, 相对场功率流出，时均 (W) | factor=0.9, 相对场功率流出，时均 (W) | factor=1, 相对场功率流出，时均 (W)
    599.585 | 1.715e-20 | 7.55605e-19 | 4.91155e-18 | 1.80816e-17 | 4.82487e-17 | 1.03743e-16 | 1.95662e-16 | 3.39078e-16 | 5.43322e-16 | 8.18424e-16
  rp2: Table "方向性 1"
    // 辐射方向图
    θ (deg) | φ (deg) | 方向性 | 方向性 (dB)
    85.9091 | 272 | 1.59529 | 2.02841

Plots
  pg1: PlotGroup3D "电场 (ewfd)" on domains 6 | data = dset2
    mslc1: Multislice "多切面 1" | expr = ewfd.Ex; descr = 电场，x 分量
  pg2: PolarGroup "二维远场 (ewfd)" | data = dset2
    rp1: RadiationPattern "xy - 辐射方向图" | expr = ewfd.normEfar; phidisc = 180
    rp2: RadiationPattern "zx - 辐射方向图 1" | expr = ewfd.normEfar; phidisc = 180; normal = {0, 1, 0}; refdir = {0, 0, 1}
  pg3: PlotGroup3D "三维远场 (ewfd)" | data = dset2
    rp1: RadiationPattern "辐射方向图 1"
      expr = ewfd.normEfar
      thetadisc = 45
      phidisc = 45
      directivity = on
      directivityexpr = ewfd.normEfar^2
      table = rp1
  pg4: PlotGroup1D "一维绘图组 4" | data = dset2
    glob1: Global "全局 1"
      data = dset2
      expr = {E_radiation, (2*pi/lbd)^4*((1+dn)^2 - 1)^2*(4*pi/3*(scale*factor)^3)^2*E0^2/(2*376.7[ohm])/(6*pi)}
      xdata = expr
      xdataexpr = factor
  pg5: PlotGroup3D "电场 (ewfd) 1" | data = dset4
    mslc1: Multislice "多切面 1" | expr = ewfd.normE
  pg6: PolarGroup "二维远场 (ewfd) 1" | data = dset4
    rp1: RadiationPattern "辐射方向图 1" | expr = ewfd.normEfar; phidisc = 180
  pg7: PlotGroup3D "三维远场 (ewfd) 1" | data = dset4
    rp1: RadiationPattern "辐射方向图 1"
      expr = ewfd.normEfar
      thetadisc = 45
      phidisc = 45
      directivity = on
      directivityexpr = ewfd.normEfar^2
      table = rp2
  pg8: PlotGroup1D "一维绘图组 8" | data = dset4
    glob1: Global "全局 1"
      data = dset4
      expr = {E_radiation, (2*pi/lbd)^4*((1+dn)^2 - 1)^2*(4*pi/3*(scale*factor)^3)^2*E0^2/(2*376.7[ohm])/(6*pi)}
      descr = {simulation, analyze}
      xdata = expr
      xdataexpr = lbd

Exports
  anim1: Animation "动画 1" | target = player; sweeptype = dde