// COMSOL Multiphysics 6.1.0.252 model "dual_waveguide.mph"
// Outline of the model tree

Parameters
  d = 1.6[um]
  a = 1[um]
  n1 = 1.5
  n2 = 1.2
  L = 2[um]
  lbd = 780[nm]
  nu = c_const/lbd

Geometry
  geom1 "几何 1" (2D, length unit m)
    r1: Rectangle "矩形 1" | pos = {0, d/2}; base = center; size = {L, a}
    r2: Rectangle "矩形 2" | pos = {0, -d/2}; base = center; size = {L, a}
    r3: Rectangle "矩形 3" | base = center; size = {L, 5*d+4[um]}
    fin: Finalize "形成联合体"

Materials
  mat1: Common "材料 1" on all domains
    RefractiveIndex "折射率"
      n = n1
      ki = 0
  mat2: Common "材料 2" on domains 1, 3, 5
    RefractiveIndex "折射率"
      n = n2
      ki = 0

Physics
  ewfd: ElectromagneticWavesFrequencyDomain "电磁波，频域" on all domains
    dependent variable E = {Ex, Ey, Ez}
    MeshControl.SizeControlParameter = UserDefined
    MeshControl.PhysicsControlledMeshMaximumElementSize = lbd/6
    components.components = outofplane
    wee1: WaveEquationElectric "波动方程，电 1" (default)
    pec1: PerfectElectricConductor "理想电导体 1" (default)
    init1: init "初始值 1" (default)
    sctr1: Scattering "散射边界条件 1" on boundaries 2, 11
    port1: Port "端口 1" on boundaries 1, 3, 5, 7, 9 | PortType = Numeric
    port2: Port "端口 2" on boundaries 12-16 | PortExcitation = off; PortType = Numeric

Mesh
  mesh1 "网格 1" (physics-controlled)

Studies
  std1 "研究 1"
    bma: BoundaryModeAnalysis "边界模式分析" | modeFreq = nu; neigs = 6; shift = n1; linpsolnum = auto

Solver configurations
  sol1 "解 1" (study std1)
    v1: Variables "因变量 1"
    e1: Eigenvalue "特征值求解器 1" | shift = n1; eigref = n1
      d1: Direct "建议的直接求解器 (ewfd)"

Datasets
  dset1: Solution | solution = sol1

Plots
  pg1: PlotGroup2D "电场 (ewfd)" | data = dset1
    surf1: Surface "表面 1" | expr = ewfd.normE
  pg2: PlotGroup2D "电模场，端口“1” (ewfd)" | data = dset1
    line1: Line "线 1" | expr = root.comp1.ewfd.normEbm_1; linetype = tube
      hght1: Height "高度表达式 1" | expr = ewfd.normE
  pg3: PlotGroup2D "电模场，端口“2” (ewfd)" | data = dset1
    line1: Line "线 1" | expr = root.comp1.ewfd.normEbm_2; linetype = tube
      hght1: Height "高度表达式 1" | expr = ewfd.normE