// COMSOL Multiphysics 6.1.0.252 model "Single Negative Media.mph"
// Outline of the model tree

Parameters
  d = 600[nm]
  a = 1000[nm]
  epsilonr_1 = 1
  mur_1 = 1
  epsilonr_2 = -1
  mur_2 = 1
  lbd0 = 120[nm]
  theta = 60[deg]
  Z1m = sqrt(mu0_const/epsilon0_const)*sqrt(abs(mur_1/epsilonr_1))
  Z2m = sqrt(mu0_const/epsilon0_const)*sqrt(abs(mur_2/epsilonr_2))
  E0 = 1e5[V/m]
  W0 = a*E0^2/(2*Z1m)*cos(theta)
  rr = (1j*Z2m*cos(theta) - Z1m*sqrt(1+sin(theta)^2) )/(1j*Z2m*cos(theta) + Z1m*sqrt(1+sin(theta)^2) )
  tt = (2*1j*Z2m*cos(theta))/(1j*Z2m*cos(theta) + Z1m*sqrt(1+sin(theta)^2) )

Coordinate systems
  pml1: PML "完美匹配层 1" on domains 1, 4

Geometry
  geom1 "几何 1" (2D, length unit nm)
    r1: Rectangle "矩形 1" | pos = {a/2, -d/2}; base = center; layername = 层 1; layer = 60[nm]; size = {a, d}
    r2: Rectangle "矩形 2"
      pos = {a/2, d/2}
      base = center
      layername = 层 1
      layer = 60[nm]
      layerbottom = off
      layertop = on
      size = {a, d}
    fin: Finalize "形成联合体"

Physics
  ewfd: ElectromagneticWavesFrequencyDomain "电磁波，频域" on all domains
    dependent variable E = {Ex, Ey, Ez}
    MeshControl.SizeControlParameter = UserDefined
    MeshControl.PhysicsControlledMeshMaximumElementSize = lbd0/4.5
    components.components = outofplane
    wee1: WaveEquationElectric "波动方程，电 +" (default)
      DisplacementFieldModel = RelativePermittivity
      epsilonr_mat = userdef
      epsilonr = epsilonr_1
      mur_mat = userdef
      mur = mur_1
      sigma_mat = userdef
      sigma = 0
    pec1: PerfectElectricConductor "理想电导体 1" (default)
    init1: init "初始值 1" (default)
    wee2: WaveEquationElectric "波动方程，电 -" on domains 1, 2
      DisplacementFieldModel = RelativePermittivity
      epsilonr_mat = userdef
      epsilonr = epsilonr_2
      mur_mat = userdef
      mur = mur_2
      sigma_mat = userdef
      sigma = 0
    pc1: PeriodicCondition "周期性条件 1" on boundaries 1, 3, 5, 7, 10-13
      PeriodicType = Floquet
      Floquet_source = FromPeriodicPort
      kFloquet = {ewfd.k*sin(theta), 0, 0}
      destinationDomains: boundaries 10-13
    port1: Port "端口 1" on boundaries 8
      Pin = W0
      PortSlit = 1
      SlitType = DomainBacked
      PortOrientation = ReversePort
      PortType = Periodic
      E0 = {0, 0, 1*exp(-1j*ewfd.k*sin(theta)*x)}
      Eampl = {0, 0, 1}
      alpha_inc = theta
    port2: Port "端口 2" on boundaries 4
      PortSlit = 1
      SlitType = DomainBacked
      PortOrientation = ForwardPort
      PortType = Periodic
      Eampl = {0, 0, 1}
    sctr1: Scattering "散射边界条件 1" on boundaries 2, 9

Mesh
  mesh1 "网格 1" (physics-controlled)

Studies
  std1 "研究 1"
    freq: Frequency "频域" | punit = THz; plist = c_const/lbd0

Solver configurations
  sol1 "解 1" (study std1)
    v1: Variables "因变量 1"
    s1: Stationary "稳态求解器 1" | stol = 0.01; linpmethod = sol
      p1: Parametric "参数化 1" | pname = freq; plistarr = c_const/lbd0; punit = THz; pcontinuationmode = no
      fc1: FullyCoupled "全耦合 1" | linsolver = d1
      d1: Direct "建议的直接求解器 (ewfd)"

Datasets
  dset1: Solution | solution = sol1
  cln1: CutLine2D "二维截线 1" | data = dset1; genpoints = {{a/2, 0}, {a/2, -d + 60[nm]}}
  grid1: Grid1D "一维栅格 1" | source = data; data = dset1; parmax1 = 500[nm]

Derived values
  gev1: EvalGlobal "反射率 (ewfd)" | data = dset1; table = tbl1; expr = {ewfd.Rport_1, ewfd.Rtotal}

Tables
  tbl1: Table "表格 1"
    freq (THz) | 反射率，端口 1 (1) | 总反射率 (1)
    2498.27 | 0 | 0

Plots
  pg1: PlotGroup2D "电场 (ewfd)" | data = dset1
    surf1: Surface "表面 1" | expr = ewfd.Ez
  pg2: PlotGroup1D "一维绘图组 2" | data = dset1
    lngr1: LineGraph "线结果图 1" | data = cln1; expr = abs(ewfd.Ez); legends = simu
    lngr2: LineGraph "线结果图 2"
      data = grid1
      expr = abs(E0*tt*exp(-sqrt(1+sin(theta)^2)*ewfd.k0*x)*exp(-1j*ewfd.k0*(d-60[nm])*cos(theta)))
      legends = cal

Exports
  anim1: Animation "动画 1" | target = player; sweeptype = dde